*Heading
** Job name: Job-1 Model name: wing_box
** Generated by: Abaqus/CAE 2023
*Preprint, echo=NO, model=NO, history=NO, contact=NO
**
** PARTS
**
*Part, name=FRONT_SPAR
*Node
      1,  -4.71999979,           0.,  0.428339988
      2,  -3.71308041,          1.5,  0.336962044
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*Element, type=S4R
230,   1,  25, 233,   7
231,  25,  26, 232, 233
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*Element, type=S3R
233,  27,  28, 231
345,  2, 49, 54
347,  50,  51, 319
348,  51,  52, 319
350,  53,   4, 141
*Elset, elset=FRONT_SPAR, generate
 230,  524,    1
** Section: Section-3-FRONT_SPAR
*Shell Section, elset=FRONT_SPAR, material=TEST_MATERIAL-2
0.01, 5
*End Part
**
*Part, name=LOWER_SKIN
*Node
      1,  -4.71999979,           0., -0.249569997
      2,  -3.71308041,          1.5, -0.196329132
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*Element, type=S4R
476,   2,  30, 485,  75
477,  30,  29, 484, 485
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*Element, type=S3R
482,  25,  24, 480
489,  18,  17, 474
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*Elset, elset=LOWER_SKIN, generate
  476,  1814,     1
** Section: Section-2-LOWER_SKIN
*Shell Section, elset=LOWER_SKIN, material=TEST_MATERIAL-2
0.003, 5
*End Part
**
*Part, name=REAR_SPAR
*Node
      1,  -1.76999998,           0.,  0.305620015
      2,  -1.39240515,          1.5,  0.240421966
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*Element, type=S4R
204,   1,  22, 205,   7
205,  22,  23, 204, 205
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*Element, type=S3R
206,  23,  24, 204
269,  2, 41, 44
272,  43,   4, 123
*Elset, elset=REAR_SPAR, generate
 204,  430,    1
** Section: Section-4-REAR_SPAR
*Shell Section, elset=REAR_SPAR, material=TEST_MATERIAL-2
0.01, 5
*End Part
**
*Part, name=UPPER_SKIN
*Node
      1,  -4.71999979,           0.,  0.428339988
      2,  -3.71308041,          1.5,  0.336962044
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*Element, type=S4R
476,   2,  30, 485,  75
477,  30,  29, 484, 485
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*Element, type=S3R
482,  25,  24, 480
489,  18,  17, 474
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*Elset, elset=UPPER_SKIN, generate
  476,  1814,     1
** Section: Section-1-UPPER_SKIN
*Shell Section, elset=UPPER_SKIN, material=TEST_MATERIAL-2
0.003, 5
*End Part
**
**
** ASSEMBLY
**
*Assembly, name=Assembly
**
*Instance, name=UPPER_SKIN-INSTANCE, part=UPPER_SKIN
*End Instance
**
*Instance, name=LOWER_SKIN-INSTANCE, part=LOWER_SKIN
*End Instance
**
*Instance, name=FRONT_SPAR-INSTANCE, part=FRONT_SPAR
*End Instance
**
*Instance, name=REAR_SPAR-INSTANCE, part=REAR_SPAR
*End Instance
**
*Elset, elset=NONE-ELSET-E2, instance=REAR_SPAR-INSTANCE, generate
 254,  268,    1
*Elset, elset=NONE-ELSET-E2-1, instance=REAR_SPAR-INSTANCE
 208,
*Elset, elset=NONE-ELSET-E2-2, instance=REAR_SPAR-INSTANCE, generate
 352,  430,    1
*Elset, elset=NONE-ELSET-E2-3, instance=REAR_SPAR-INSTANCE
 272,
*Elset, elset=NONE-ELSET-E2-4, instance=FRONT_SPAR-INSTANCE, generate
 327,  344,    1
*Elset, elset=NONE-ELSET-E2-5, instance=FRONT_SPAR-INSTANCE
 236,
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*Nset, nset=SET, instance=UPPER_SKIN-INSTANCE
  1,  3, 31, 32, 33, 34
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*Nset, nset=SET-1, instance=LOWER_SKIN-INSTANCE
  1,  3, 31, 32, 33, 34
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*Nset, nset=SET-2, instance=FRONT_SPAR-INSTANCE
  1,  3, 25, 26, 27, 28, 29, 30
*Nset, nset=SET-3, instance=REAR_SPAR-INSTANCE
  1,  3, 22, 23, 24, 25
*Elset, elset=_SURFACE_SPOS, internal, instance=UPPER_SKIN-INSTANCE, generate
 869,  884,    1
*Surface, type=ELEMENT, name=SURFACE
_SURFACE_SPOS, SPOS
*Elset, elset=_SURFACE-1_SPOS, internal, instance=UPPER_SKIN-INSTANCE, generate
 885,  903,    1
*Surface, type=ELEMENT, name=SURFACE-1
_SURFACE-1_SPOS, SPOS
*Elset, elset=_SURFACE-2_SPOS, internal, instance=UPPER_SKIN-INSTANCE, generate
 1647,  1726,     1
*Surface, type=ELEMENT, name=SURFACE-2
_SURFACE-2_SPOS, SPOS
*Elset, elset=_SURFACE-3_SPOS, internal, instance=UPPER_SKIN-INSTANCE, generate
 1727,  1814,     1
*Surface, type=ELEMENT, name=SURFACE-3
_SURFACE-3_SPOS, SPOS
*Elset, elset=_SURFACE-4_SPOS, internal, instance=LOWER_SKIN-INSTANCE, generate
 869,  884,    1
*Surface, type=ELEMENT, name=SURFACE-4
_SURFACE-4_SPOS, SPOS
*Elset, elset=_SURFACE-5_SPOS, internal, instance=LOWER_SKIN-INSTANCE, generate
 885,  903,    1
*Surface, type=ELEMENT, name=SURFACE-5
_SURFACE-5_SPOS, SPOS
*Elset, elset=_SURFACE-6_SPOS, internal, instance=LOWER_SKIN-INSTANCE, generate
 1647,  1726,     1
*Surface, type=ELEMENT, name=SURFACE-6
_SURFACE-6_SPOS, SPOS
*Elset, elset=_SURFACE-7_SPOS, internal, instance=LOWER_SKIN-INSTANCE, generate
 1727,  1814,     1
*Surface, type=ELEMENT, name=SURFACE-7
_SURFACE-7_SPOS, SPOS
*Elset, elset=_SURFACE-8_E4, internal, instance=REAR_SPAR-INSTANCE
 204,
*Elset, elset=_SURFACE-8_E2, internal, instance=REAR_SPAR-INSTANCE, generate
 254,  268,    1
*Surface, type=ELEMENT, name=SURFACE-8
_SURFACE-8_E4, E4
_SURFACE-8_E2, E2
*Elset, elset=_SURFACE-9_E2, internal, instance=REAR_SPAR-INSTANCE
 208,
*Elset, elset=_SURFACE-9_E4, internal, instance=REAR_SPAR-INSTANCE, generate
 209,  223,    1
*Surface, type=ELEMENT, name=SURFACE-9
_SURFACE-9_E2, E2
_SURFACE-9_E4, E4
*Elset, elset=_SURFACE-10_E3, internal, instance=REAR_SPAR-INSTANCE
 269,
*Elset, elset=_SURFACE-10_E2, internal, instance=REAR_SPAR-INSTANCE, generate
 352,  430,    1
*Surface, type=ELEMENT, name=SURFACE-10
_SURFACE-10_E3, E3
_SURFACE-10_E2, E2
*Elset, elset=_SURFACE-11_E2, internal, instance=REAR_SPAR-INSTANCE
 272,
*Elset, elset=_SURFACE-11_E4, internal, instance=REAR_SPAR-INSTANCE, generate
 273,  351,    1
*Surface, type=ELEMENT, name=SURFACE-11
_SURFACE-11_E2, E2
_SURFACE-11_E4, E4
*Elset, elset=_SURFACE-12_E4, internal, instance=FRONT_SPAR-INSTANCE
 230,
*Elset, elset=_SURFACE-12_E2, internal, instance=FRONT_SPAR-INSTANCE, generate
 327,  344,    1
*Surface, type=ELEMENT, name=SURFACE-12
_SURFACE-12_E4, E4
_SURFACE-12_E2, E2
*Elset, elset=_SURFACE-13_E2, internal, instance=FRONT_SPAR-INSTANCE
 236,
*Elset, elset=_SURFACE-13_E4, internal, instance=FRONT_SPAR-INSTANCE, generate
 237,  254,    1
*Surface, type=ELEMENT, name=SURFACE-13
_SURFACE-13_E2, E2
_SURFACE-13_E4, E4
*Elset, elset=_SURFACE-14_E3, internal, instance=FRONT_SPAR-INSTANCE
 345,
*Elset, elset=_SURFACE-14_E2, internal, instance=FRONT_SPAR-INSTANCE, generate
 438,  524,    1
*Surface, type=ELEMENT, name=SURFACE-14
_SURFACE-14_E3, E3
_SURFACE-14_E2, E2
*Elset, elset=_SURFACE-15_E2, internal, instance=FRONT_SPAR-INSTANCE
 350,
*Elset, elset=_SURFACE-15_E4, internal, instance=FRONT_SPAR-INSTANCE, generate
 351,  437,    1
*Surface, type=ELEMENT, name=SURFACE-15
_SURFACE-15_E2, E2
_SURFACE-15_E4, E4
*Elset, elset=_SURFACE-16_SPOS, internal, instance=UPPER_SKIN-INSTANCE
  476,  477,  478,  479,  480,  481
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*Surface, type=ELEMENT, name=SURFACE-16
_SURFACE-16_SPOS, SPOS
** Constraint: TIE-1
*Tie, name=TIE-1, adjust=yes, type=SURFACE TO SURFACE
SURFACE-8, SURFACE
** Constraint: TIE-1-1
*Tie, name=TIE-1-1, adjust=yes, type=SURFACE TO SURFACE
SURFACE-10, SURFACE-2
** Constraint: TIE-2-1
*Tie, name=TIE-2-1, adjust=yes, type=SURFACE TO SURFACE
SURFACE-12, SURFACE-1
** Constraint: TIE-3-1
*Tie, name=TIE-3-1, adjust=yes, type=SURFACE TO SURFACE
SURFACE-14, SURFACE-3
** Constraint: TIE-4-1
*Tie, name=TIE-4-1, adjust=yes, type=SURFACE TO SURFACE
SURFACE-9, SURFACE-4
** Constraint: TIE-5-1
*Tie, name=TIE-5-1, adjust=yes, type=SURFACE TO SURFACE
SURFACE-11, SURFACE-6
** Constraint: TIE-6-1
*Tie, name=TIE-6-1, adjust=yes, type=SURFACE TO SURFACE
SURFACE-13, SURFACE-5
** Constraint: TIE-7-1
*Tie, name=TIE-7-1, adjust=yes, type=SURFACE TO SURFACE
SURFACE-15, SURFACE-7
*End Assembly
**
** MATERIALS
**
*Material, name=TEST_MATERIAL-2
*Density
900.,
*Elastic
 1e+09, 0.3
**
** BOUNDARY CONDITIONS
**
** Name: Disp-BC-1 Type: Displacement/Rotation
*Boundary
SET, 1, 1
** Name: Disp-BC-2 Type: Displacement/Rotation
*Boundary
SET, 2, 2
** Name: Disp-BC-3 Type: Displacement/Rotation
*Boundary
SET, 3, 3
** Name: Disp-BC-4 Type: Displacement/Rotation
*Boundary
SET, 4, 4
** Name: Disp-BC-5 Type: Displacement/Rotation
*Boundary
SET, 5, 5
** Name: Disp-BC-6 Type: Displacement/Rotation
*Boundary
SET, 6, 6
** Name: Disp-BC-7 Type: Displacement/Rotation
*Boundary
SET-1, 1, 1
** Name: Disp-BC-8 Type: Displacement/Rotation
*Boundary
SET-1, 2, 2
** Name: Disp-BC-9 Type: Displacement/Rotation
*Boundary
SET-1, 3, 3
** Name: Disp-BC-10 Type: Displacement/Rotation
*Boundary
SET-1, 4, 4
** Name: Disp-BC-11 Type: Displacement/Rotation
*Boundary
SET-1, 5, 5
** Name: Disp-BC-12 Type: Displacement/Rotation
*Boundary
SET-1, 6, 6
** Name: Disp-BC-13 Type: Displacement/Rotation
*Boundary
SET-2, 1, 1
** Name: Disp-BC-14 Type: Displacement/Rotation
*Boundary
SET-2, 2, 2
** Name: Disp-BC-15 Type: Displacement/Rotation
*Boundary
SET-2, 3, 3
** Name: Disp-BC-16 Type: Displacement/Rotation
*Boundary
SET-2, 4, 4
** Name: Disp-BC-17 Type: Displacement/Rotation
*Boundary
SET-2, 5, 5
** Name: Disp-BC-18 Type: Displacement/Rotation
*Boundary
SET-2, 6, 6
** Name: Disp-BC-19 Type: Displacement/Rotation
*Boundary
SET-3, 1, 1
** Name: Disp-BC-20 Type: Displacement/Rotation
*Boundary
SET-3, 2, 2
** Name: Disp-BC-21 Type: Displacement/Rotation
*Boundary
SET-3, 3, 3
** Name: Disp-BC-22 Type: Displacement/Rotation
*Boundary
SET-3, 4, 4
** Name: Disp-BC-23 Type: Displacement/Rotation
*Boundary
SET-3, 5, 5
** Name: Disp-BC-24 Type: Displacement/Rotation
*Boundary
SET-3, 6, 6
** ----------------------------------------------------------------
**
** STEP: analysis1
**
*Step, name=analysis1, nlgeom=NO
*Static
0.01, 1., 1e-15, 0.1
**
** LOADS
**
** Name: SURFFORCE-1   Type: Pressure
*Dsload
SURFACE-16, P, 1000.
**
** OUTPUT REQUESTS
**
*Restart, write, frequency=0
**
** FIELD OUTPUT: FIELD-OUTPUT
**
*Output, field, variable=PRESELECT
**
** HISTORY OUTPUT: HISTORY-OUTPUT
**
*Output, history, variable=PRESELECT
*End Step
