*Heading
** Job name: ParaPy Project Model name: ParaPy Model
** Generated by: ParaPy abaqus 0.1.15
*PrePrint, ECHO=NO, MODEL=NO, HISTORY=NO, CONTACT=NO
**
** PARTS
**
*Part, NAME=Upper_Skin
*Node
362, -3.3370543034313407, 3.68307692307693, 0.28691603600030985
55, -1.4707859193505424, 2.1388888888888893, 0.253955702074527
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*Element, TYPE=S4R
995, 9, 12, 299, 170
996, 170, 299, 300, 169
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*Element, TYPE=S3R
642, 137, 136, 561
671, 109, 533, 534
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*ElSet, ELSET=Upper_Skin
995, 996, 997, 998, 999, 1000
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*Shell Section, ELSET=Upper_Skin, MATERIAL=user-chosen_material
0.003
*End Part
*Part, NAME=Lower_Skin
*Node
634, -0.7044810894618289, 8.411111111111111, -0.10804403478805405
214, 0.07389038350810351, 7.844444444444449, -0.0708023850185337
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*Element, TYPE=S4R
994, 9, 12, 299, 107
995, 107, 299, 300, 108
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*Element, TYPE=S3R
609, 71, 70, 536
611, 69, 68, 535
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*ElSet, ELSET=Lower_Skin
994, 995, 996, 997, 998, 999
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*Shell Section, ELSET=Lower_Skin, MATERIAL=user-chosen_material
0.003
*End Part
*Part, NAME=Front_spar
*Node
37, -4.032809766929477, 1.8421052631578951, -0.21323481642639602
195, -3.483057580473057, 3.315789473684212, 0.14933609376278226
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*Element, TYPE=S3R
235, 2, 46, 48
237, 47, 4, 112
178, 25, 26, 177
*Element, TYPE=S4R
236, 46, 47, 112, 48
238, 6, 5, 111, 175
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*ElSet, ELSET=Front_spar
235, 236, 237, 238, 239, 240
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*Shell Section, ELSET=Front_spar, MATERIAL=user-chosen_material
0.05
*End Part
*Part, NAME=Rear_spar
*Node
91, 1.545920103557395, 12.566666666666656, 0.11736305275630937
176, -1.4979871994095841, 1.9444444444444453, 0.07589801810341892
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*Element, TYPE=S3R
206, 2, 43, 44
170, 24, 25, 168
*Element, TYPE=S4R
207, 43, 4, 106, 44
208, 6, 5, 105, 167
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*ElSet, ELSET=Rear_spar
206, 207, 208, 209, 210, 211
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*Shell Section, ELSET=Rear_spar, MATERIAL=user-chosen_material
0.05
*End Part
*Part, NAME=Upper_stringers
*Node
344, -0.4224554761813677, 7.269879199281386, 0.19224532748252757
114, -2.4999700724668097, 2.1502297483171247, 0.2944275638622098
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*Element, TYPE=S4R
1068, 11, 12, 120, 137
1070, 8, 10, 121, 104
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*Element, TYPE=S3R
1069, 12, 9, 120
1440, 19, 43, 701
1106, 19, 16, 172
1184, 5, 31, 325
1311, 12, 37, 512
1032, 5, 2, 69
1145, 26, 23, 226
1569, 26, 49, 891
*ElSet, ELSET=Upper_stringers
1068, 1069, 1070, 1071, 1072, 1073
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*Shell Section, ELSET=Upper_stringers, MATERIAL=user-chosen_material
0.005
*End Part
*Part, NAME=Lower_stringers
*Node
486, 0.4041892348047001, 10.557240223260258, -0.08063309633482796
987, -0.5473709278733865, 9.531831531289956, -0.06191437132813085
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*Element, TYPE=S4R
1105, 18, 19, 172, 190
1107, 15, 17, 173, 155
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*Element, TYPE=S3R
1106, 19, 16, 172
1145, 26, 23, 226
1183, 29, 5, 263
1032, 5, 2, 69
1069, 12, 9, 120
1439, 41, 19, 638
1310, 35, 12, 449
1568, 47, 26, 827
*ElSet, ELSET=Lower_stringers
1105, 1106, 1107, 1108, 1109, 1110
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*Shell Section, ELSET=Lower_stringers, MATERIAL=user-chosen_material
0.005
*End Part
*Part, NAME=Upper_Skin_centre_section
*Node
220, -2.753333333333334, -0.19230769230769218, 0.34652666666666665
21, -3.7366666666666672, 0.0, 0.38743333333333335
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*Element, TYPE=S4R
57, 2, 16, 57, 43
58, 43, 57, 58, 44
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*ElSet, ELSET=Upper_Skin_centre_section
57, 58, 59, 60, 61, 62
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*Shell Section, ELSET=Upper_Skin_centre_section, MATERIAL=user-chosen_material
0.003
*End Part
*Part, NAME=Lower_Skin_centre_section
*Node
173, -3.7366666666666672, -0.7692307692307693, -0.20846666666666663
122, -2.753333333333333, -1.5384615384615385, -0.1673633333333333
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*Element, TYPE=S4R
57, 2, 16, 57, 43
58, 43, 57, 58, 44
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*ElSet, ELSET=Lower_Skin_centre_section
57, 58, 59, 60, 61, 62
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*Shell Section, ELSET=Lower_Skin_centre_section, MATERIAL=user-chosen_material
0.003
*End Part
*Part, NAME=Front_spar_centre_section
*Node
43, -4.720000000000001, -1.923076923076923, -0.08009250000000007
21, -4.720000000000001, -0.38461538461538464, -0.24957000000000001
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*Element, TYPE=S4R
35, 2, 16, 35, 32
36, 32, 35, 36, 33
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*ElSet, ELSET=Front_spar_centre_section
35, 36, 37, 38, 39, 40
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*Shell Section, ELSET=Front_spar_centre_section, MATERIAL=user-chosen_material
0.01
*End Part
*Part, NAME=Rear_spar_centre_section
*Node
45, -1.77, -1.1538461538461537, 0.16166000000000003
50, -1.77, -0.7692307692307693, 0.017699999999999994
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*Element, TYPE=S4R
33, 2, 16, 33, 31
34, 31, 33, 34, 32
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*ElSet, ELSET=Rear_spar_centre_section
33, 34, 35, 36, 37, 38
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*Shell Section, ELSET=Rear_spar_centre_section, MATERIAL=user-chosen_material
0.01
*End Part
*Part, NAME=Ribs_centre_section
*Node
83, -3.9333333333333336, -0.5, -0.21668733333333334
19, -1.77, -2.0, -0.12626
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*Element, TYPE=S4R
232, 6, 72, 215, 67
233, 72, 71, 214, 215
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*Element, TYPE=S3R
234, 71, 70, 214
326, 137, 136, 270
372, 170, 169, 298
280, 104, 103, 242
187, 37, 36, 187
*ElSet, ELSET=Ribs_centre_section
232, 233, 234, 235, 236, 237
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*Shell Section, ELSET=Ribs_centre_section, MATERIAL=user-chosen_material
0.005
*End Part
*Part, NAME=Upper_stringers_centre_section
*Node
87, -2.9000000000000004, -1.9230769230769231, 0.25470800000000005
22, -4.180000000000001, 0.0, 0.4037959999999998
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*Element, TYPE=S4R
251, 20, 144, 156, 22
252, 144, 143, 155, 156
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*ElSet, ELSET=Upper_stringers_centre_section
251, 252, 253, 254, 255, 256
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*Shell Section, ELSET=Upper_stringers_centre_section, MATERIAL=user-chosen_material
0.005
*End Part
*Part, NAME=Lower_stringers_centre_section
*Node
20, -4.080000000000001, 0.0, -0.22490800000000016
31, -2.3100000000000005, -1.153846153846154, -0.15092200000000003
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*Element, TYPE=S4R
225, 14, 108, 120, 16
226, 108, 107, 119, 120
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*ElSet, ELSET=Lower_stringers_centre_section
225, 226, 227, 228, 229, 230
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*Shell Section, ELSET=Lower_stringers_centre_section, MATERIAL=user-chosen_material
0.005
*End Part
**
** ASSEMBLY
**
*Assembly, NAME=Assembly
*Instance, NAME=Upper_Skin-instance, PART=Upper_Skin
*End Instance
*Instance, NAME=Lower_Skin-instance, PART=Lower_Skin
*End Instance
*Instance, NAME=Front_spar-instance, PART=Front_spar
*End Instance
*Instance, NAME=Rear_spar-instance, PART=Rear_spar
*End Instance
*Instance, NAME=Upper_stringers-instance, PART=Upper_stringers
*End Instance
*Instance, NAME=Lower_stringers-instance, PART=Lower_stringers
*End Instance
*Instance, NAME=Upper_Skin_centre_section-instance, PART=Upper_Skin_centre_section
*End Instance
*Instance, NAME=Lower_Skin_centre_section-instance, PART=Lower_Skin_centre_section
*End Instance
*Instance, NAME=Front_spar_centre_section-instance, PART=Front_spar_centre_section
*End Instance
*Instance, NAME=Rear_spar_centre_section-instance, PART=Rear_spar_centre_section
*End Instance
*Instance, NAME=Ribs_centre_section-instance, PART=Ribs_centre_section
*End Instance
*Instance, NAME=Upper_stringers_centre_section-instance, PART=Upper_stringers_centre_section
*End Instance
*Instance, NAME=Lower_stringers_centre_section-instance, PART=Lower_stringers_centre_section
*End Instance
*ElSet, ELSET=None-SET, INSTANCE=Upper_Skin-instance
571, 572, 573, 574, 575, 576
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*ElSet, ELSET=None-SET-1, INSTANCE=Upper_Skin-instance
589, 590, 591, 592, 593, 594
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*ElSet, ELSET=None-SET-2, INSTANCE=Lower_Skin-instance
589, 590, 591, 592, 593, 594
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*ElSet, ELSET=None-SET-3, INSTANCE=Upper_Skin-instance
932, 933, 934, 935, 936, 937
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*ElSet, ELSET=None-SET-4, INSTANCE=Upper_Skin-instance
995, 996, 997, 998, 999, 1000
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*ElSet, ELSET=None-SET-5, INSTANCE=Lower_Skin-instance
571, 572, 573, 574, 575, 576
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*ElSet, ELSET=None-SET-6, INSTANCE=Lower_Skin-instance
589, 590, 591, 592, 593, 594
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*ElSet, ELSET=None-SET-7, INSTANCE=Lower_Skin-instance
931, 932, 933, 934, 935, 936
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*ElSet, ELSET=None-SET-8, INSTANCE=Lower_Skin-instance
994, 995, 996, 997, 998, 999
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*ElSet, ELSET=None-ELSET-E4, INSTANCE=Rear_spar-instance
169
*ElSet, ELSET=None-ELSET-E2, INSTANCE=Rear_spar-instance
205, 204, 203, 202, 201, 200
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*ElSet, ELSET=None-ELSET-E1, INSTANCE=Rear_spar-instance
169, 170, 171
*ElSet, ELSET=None-ELSET-E2-1, INSTANCE=Rear_spar-instance
171
*ElSet, ELSET=None-ELSET-E4-1, INSTANCE=Rear_spar-instance
188, 187, 186, 185, 184, 183
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*ElSet, ELSET=None-ELSET-E3, INSTANCE=Rear_spar-instance
206
*ElSet, ELSET=None-ELSET-E2-2, INSTANCE=Rear_spar-instance
269, 268, 267, 266, 265, 264
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*ElSet, ELSET=None-ELSET-E2-3, INSTANCE=Rear_spar-instance
207
*ElSet, ELSET=None-ELSET-E4-2, INSTANCE=Rear_spar-instance
269, 268, 267, 266, 265, 264
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*ElSet, ELSET=None-ELSET-E4-3, INSTANCE=Front_spar-instance
177
*ElSet, ELSET=None-ELSET-E2-4, INSTANCE=Front_spar-instance
234, 233, 232, 231, 230, 229
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*ElSet, ELSET=None-ELSET-E1-1, INSTANCE=Front_spar-instance
177, 178, 179, 180
*ElSet, ELSET=None-ELSET-E2-5, INSTANCE=Front_spar-instance
180
*ElSet, ELSET=None-ELSET-E4-4, INSTANCE=Front_spar-instance
198, 197, 196, 195, 194, 193
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*ElSet, ELSET=None-ELSET-E3-1, INSTANCE=Front_spar-instance
235
*ElSet, ELSET=None-ELSET-E2-6, INSTANCE=Front_spar-instance
301, 300, 299, 298, 297, 296
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*ElSet, ELSET=None-ELSET-E2-7, INSTANCE=Front_spar-instance
237
*ElSet, ELSET=None-ELSET-E4-5, INSTANCE=Front_spar-instance
301, 300, 299, 298, 297, 296
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*ElSet, ELSET=None-ELSET-E1-2, INSTANCE=Front_spar_centre_section-instance
83, 79, 75, 71, 67, 63, 59, 55,
51, 47, 43, 39, 35
*ElSet, ELSET=None-ELSET-E3-2, INSTANCE=Front_spar_centre_section-instance
86, 82, 78, 74, 70, 66, 62, 58,
54, 50, 46, 42, 38
*ElSet, ELSET=None-ELSET-E1-3, INSTANCE=Rear_spar_centre_section-instance
69, 66, 63, 60, 57, 54, 51, 48,
45, 42, 39, 36, 33
*ElSet, ELSET=None-ELSET-E3-3, INSTANCE=Rear_spar_centre_section-instance
71, 68, 65, 62, 59, 56, 53, 50,
47, 44, 41, 38, 35
*ElSet, ELSET=None-ELSET-E1-4, INSTANCE=Upper_Skin_centre_section-instance
237, 222, 207, 192, 177, 162, 147, 132,
117, 102, 87, 72, 57
*ElSet, ELSET=None-ELSET-E3-4, INSTANCE=Upper_Skin_centre_section-instance
251, 236, 221, 206, 191, 176, 161, 146,
131, 116, 101, 86, 71
*ElSet, ELSET=None-ELSET-E1-5, INSTANCE=Lower_Skin_centre_section-instance
237, 222, 207, 192, 177, 162, 147, 132,
117, 102, 87, 72, 57
*ElSet, ELSET=None-ELSET-E3-5, INSTANCE=Lower_Skin_centre_section-instance
251, 236, 221, 206, 191, 176, 161, 146,
131, 116, 101, 86, 71
*ElSet, ELSET=None-SET-9, INSTANCE=Upper_Skin_centre_section-instance
57, 58, 59, 60, 61, 62
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*ElSet, ELSET=None-SET-10, INSTANCE=Lower_Skin_centre_section-instance
57, 58, 59, 60, 61, 62
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*ElSet, ELSET=None-SET-11, INSTANCE=Front_spar_centre_section-instance
35, 36, 37, 38, 39, 40
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*ElSet, ELSET=None-SET-12, INSTANCE=Rear_spar_centre_section-instance
33, 34, 35, 36, 37, 38
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*ElSet, ELSET=None-ELSET-E2-8, INSTANCE=Upper_Skin_centre_section-instance
237, 238, 239, 240, 241, 242, 243, 244,
245, 246, 247, 248, 249, 250, 251
*ElSet, ELSET=None-ELSET-E2-9, INSTANCE=Lower_Skin_centre_section-instance
237, 238, 239, 240, 241, 242, 243, 244,
245, 246, 247, 248, 249, 250, 251
*ElSet, ELSET=None-ELSET-E2-10, INSTANCE=Rear_spar_centre_section-instance
69, 70, 71
*ElSet, ELSET=None-ELSET-E2-11, INSTANCE=Front_spar_centre_section-instance
83, 84, 85, 86
*ElSet, ELSET=None-SET-13, INSTANCE=Upper_Skin-instance
368, 369, 370, 371, 372, 373
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*ElSet, ELSET=None-SET-14, INSTANCE=Upper_Skin-instance
608, 609, 610, 611, 612, 613
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*ElSet, ELSET=None-SET-15, INSTANCE=Upper_Skin-instance
608, 609, 610, 611, 612, 613
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*ElSet, ELSET=None-SET-16, INSTANCE=Lower_Skin-instance
608, 609, 610, 611, 612, 613
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*ElSet, ELSET=None-SET-17, INSTANCE=Lower_Skin-instance
368, 369, 370, 371, 372, 373
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*ElSet, ELSET=None-SET-18, INSTANCE=Upper_stringers-instance
1031, 1032, 1033, 1034, 1035, 1036
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*ElSet, ELSET=None-SET-19, INSTANCE=Upper_stringers-instance
1068, 1069, 1070, 1071, 1072, 1073
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*ElSet, ELSET=None-SET-20, INSTANCE=Upper_stringers-instance
1105, 1106, 1107, 1108, 1109, 1110
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*ElSet, ELSET=None-SET-21, INSTANCE=Upper_stringers-instance
1144, 1145, 1146, 1147, 1148, 1149
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*ElSet, ELSET=None-SET-22, INSTANCE=Upper_stringers-instance
1183, 1184, 1185, 1186, 1187, 1188
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*ElSet, ELSET=None-SET-23, INSTANCE=Upper_stringers-instance
1310, 1311, 1312, 1313, 1314, 1315
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*ElSet, ELSET=None-SET-24, INSTANCE=Upper_stringers-instance
1439, 1440, 1441, 1442, 1443, 1444
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*ElSet, ELSET=None-SET-25, INSTANCE=Upper_stringers-instance
1568, 1569, 1570, 1571, 1572, 1573
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*ElSet, ELSET=None-SET-26, INSTANCE=Lower_stringers-instance
1031, 1032, 1033, 1034, 1035, 1036
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*ElSet, ELSET=None-SET-27, INSTANCE=Lower_stringers-instance
1068, 1069, 1070, 1071, 1072, 1073
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*ElSet, ELSET=None-SET-28, INSTANCE=Lower_stringers-instance
1105, 1106, 1107, 1108, 1109, 1110
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*ElSet, ELSET=None-SET-29, INSTANCE=Lower_stringers-instance
1144, 1145, 1146, 1147, 1148, 1149
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*ElSet, ELSET=None-SET-30, INSTANCE=Lower_stringers-instance
1183, 1184, 1185, 1186, 1187, 1188
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*ElSet, ELSET=None-SET-31, INSTANCE=Lower_stringers-instance
1310, 1311, 1312, 1313, 1314, 1315
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*ElSet, ELSET=None-SET-32, INSTANCE=Lower_stringers-instance
1439, 1440, 1441, 1442, 1443, 1444
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*ElSet, ELSET=None-SET-33, INSTANCE=Lower_stringers-instance
1568, 1569, 1570, 1571, 1572, 1573
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*ElSet, ELSET=None-SET-34, INSTANCE=Upper_stringers_centre_section-instance
173, 174, 175, 176, 177, 178, 179, 180,
181, 182, 183, 184, 185
*ElSet, ELSET=None-SET-35, INSTANCE=Upper_stringers_centre_section-instance
199, 200, 201, 202, 203, 204, 205, 206,
207, 208, 209, 210, 211
*ElSet, ELSET=None-SET-36, INSTANCE=Upper_stringers_centre_section-instance
225, 226, 227, 228, 229, 230, 231, 232,
233, 234, 235, 236, 237
*ElSet, ELSET=None-SET-37, INSTANCE=Upper_stringers_centre_section-instance
251, 252, 253, 254, 255, 256, 257, 258,
259, 260, 261, 262, 263
*ElSet, ELSET=None-SET-38, INSTANCE=Lower_stringers_centre_section-instance
173, 174, 175, 176, 177, 178, 179, 180,
181, 182, 183, 184, 185
*ElSet, ELSET=None-SET-39, INSTANCE=Lower_stringers_centre_section-instance
199, 200, 201, 202, 203, 204, 205, 206,
207, 208, 209, 210, 211
*ElSet, ELSET=None-SET-40, INSTANCE=Lower_stringers_centre_section-instance
225, 226, 227, 228, 229, 230, 231, 232,
233, 234, 235, 236, 237
*ElSet, ELSET=None-SET-41, INSTANCE=Lower_stringers_centre_section-instance
251, 252, 253, 254, 255, 256, 257, 258,
259, 260, 261, 262, 263
*ElSet, ELSET=None-ELSET-E2-12, INSTANCE=Ribs_centre_section-instance
189
*ElSet, ELSET=None-ELSET-E4-6, INSTANCE=Ribs_centre_section-instance
203, 202, 201, 200, 199, 198, 197, 196,
195, 194, 193, 192, 191, 190
*ElSet, ELSET=None-ELSET-E4-7, INSTANCE=Ribs_centre_section-instance
186
*ElSet, ELSET=None-ELSET-E2-13, INSTANCE=Ribs_centre_section-instance
231, 230, 229, 228, 227, 226, 225, 224,
223, 222, 221, 220, 219, 218
*ElSet, ELSET=None-ELSET-E1-6, INSTANCE=Ribs_centre_section-instance
190, 204, 218
*ElSet, ELSET=None-ELSET-E1-7, INSTANCE=Ribs_centre_section-instance
189, 188, 187, 186
*ElSet, ELSET=None-ELSET-E2-14, INSTANCE=Ribs_centre_section-instance
264, 265, 266, 267, 268, 269, 270, 271,
272, 273, 274, 275, 276, 277
*ElSet, ELSET=None-ELSET-E4-8, INSTANCE=Ribs_centre_section-instance
232
*ElSet, ELSET=None-ELSET-E4-9, INSTANCE=Ribs_centre_section-instance
236, 237, 238, 239, 240, 241, 242, 243,
244, 245, 246, 247, 248, 249
*ElSet, ELSET=None-ELSET-E2-15, INSTANCE=Ribs_centre_section-instance
235
*ElSet, ELSET=None-ELSET-E1-8, INSTANCE=Ribs_centre_section-instance
235, 234, 233, 232
*ElSet, ELSET=None-ELSET-E1-9, INSTANCE=Ribs_centre_section-instance
236, 250, 264
*ElSet, ELSET=None-ELSET-E2-16, INSTANCE=Ribs_centre_section-instance
310, 311, 312, 313, 314, 315, 316, 317,
318, 319, 320, 321, 322, 323
*ElSet, ELSET=None-ELSET-E4-10, INSTANCE=Ribs_centre_section-instance
278
*ElSet, ELSET=None-ELSET-E4-11, INSTANCE=Ribs_centre_section-instance
282, 283, 284, 285, 286, 287, 288, 289,
290, 291, 292, 293, 294, 295
*ElSet, ELSET=None-ELSET-E2-17, INSTANCE=Ribs_centre_section-instance
281
*ElSet, ELSET=None-ELSET-E1-10, INSTANCE=Ribs_centre_section-instance
281, 280, 279, 278
*ElSet, ELSET=None-ELSET-E1-11, INSTANCE=Ribs_centre_section-instance
282, 296, 310
*ElSet, ELSET=None-ELSET-E2-18, INSTANCE=Ribs_centre_section-instance
356, 357, 358, 359, 360, 361, 362, 363,
364, 365, 366, 367, 368, 369
*ElSet, ELSET=None-ELSET-E4-12, INSTANCE=Ribs_centre_section-instance
324
*ElSet, ELSET=None-ELSET-E4-13, INSTANCE=Ribs_centre_section-instance
328, 329, 330, 331, 332, 333, 334, 335,
336, 337, 338, 339, 340, 341
*ElSet, ELSET=None-ELSET-E2-19, INSTANCE=Ribs_centre_section-instance
327
*ElSet, ELSET=None-ELSET-E1-12, INSTANCE=Ribs_centre_section-instance
327, 326, 325, 324
*ElSet, ELSET=None-ELSET-E1-13, INSTANCE=Ribs_centre_section-instance
328, 342, 356
*ElSet, ELSET=None-ELSET-E2-20, INSTANCE=Ribs_centre_section-instance
402, 403, 404, 405, 406, 407, 408, 409,
410, 411, 412, 413, 414, 415
*ElSet, ELSET=None-ELSET-E4-14, INSTANCE=Ribs_centre_section-instance
370
*ElSet, ELSET=None-ELSET-E4-15, INSTANCE=Ribs_centre_section-instance
374, 375, 376, 377, 378, 379, 380, 381,
382, 383, 384, 385, 386, 387
*ElSet, ELSET=None-ELSET-E2-21, INSTANCE=Ribs_centre_section-instance
373
*ElSet, ELSET=None-ELSET-E1-14, INSTANCE=Ribs_centre_section-instance
373, 372, 371, 370
*ElSet, ELSET=None-ELSET-E1-15, INSTANCE=Ribs_centre_section-instance
374, 388, 402
*NSet, NSET=set, INSTANCE=Upper_Skin-instance
1, 31, 32, 33, 34, 35, 36, 37,
38, 39, 40, 41, 42, 43, 44, 3
*NSet, NSET=set-1, INSTANCE=Upper_Skin_centre_section-instance
2, 43, 44, 45, 46, 47, 48, 49,
50, 51, 52, 53, 54, 55, 56, 4
*NSet, NSET=set-2, INSTANCE=Lower_Skin_centre_section-instance
2, 43, 44, 45, 46, 47, 48, 49,
50, 51, 52, 53, 54, 55, 56, 4
*NSet, NSET=set-3, INSTANCE=Front_spar_centre_section-instance
2, 32, 33, 34, 4
*NSet, NSET=set-4, INSTANCE=Rear_spar_centre_section-instance
2, 31, 32, 4
*NSet, NSET=loadpoints, INSTANCE=Upper_Skin-instance
31, 1, 32, 33, 34, 35
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*NSet, NSET=loadpoints-1, INSTANCE=Upper_Skin-instance
14, 392, 389, 391, 364, 46, 390, 393,
394, 395, 396, 397
*NSet, NSET=loadpoints-2, INSTANCE=Upper_Skin-instance
15, 365, 398, 399, 401, 406, 47, 400,
402, 403, 404, 405
*NSet, NSET=loadpoints-3, INSTANCE=Upper_Skin-instance
16, 366, 48, 407, 409, 410, 411, 412,
413, 414, 415, 408
*NSet, NSET=loadpoints-4, INSTANCE=Upper_Skin-instance
17, 420, 421, 422, 424, 367, 49, 416,
417, 418, 419, 423
*NSet, NSET=loadpoints-5, INSTANCE=Upper_Skin-instance
18, 368, 425, 426, 427, 429, 431, 432,
433, 50, 428, 430
*NSet, NSET=loadpoints-6, INSTANCE=Upper_Skin-instance
19, 369, 434, 436, 437, 438, 440, 442,
51, 435, 439, 441
*NSet, NSET=loadpoints-7, INSTANCE=Upper_Skin-instance
20, 370, 443, 444, 445, 448, 449, 450,
451, 52, 446, 447
*NSet, NSET=loadpoints-8, INSTANCE=Upper_Skin-instance
21, 371, 454, 455, 456, 457, 458, 459,
460, 53, 452, 453
*NSet, NSET=loadpoints-9, INSTANCE=Upper_Skin-instance
22, 463, 372, 462, 465, 466, 467, 468,
469, 54, 461, 464
*NSet, NSET=loadpoints-10, INSTANCE=Upper_Skin-instance
23, 470, 472, 477, 478, 373, 55, 471,
473, 474, 475, 476, 24
*NSet, NSET=loadpoints-11, INSTANCE=Upper_Skin-instance
487, 374, 481, 482, 484, 485, 486, 479,
480, 483, 56, 25
*NSet, NSET=loadpoints-12, INSTANCE=Upper_Skin-instance
375, 496, 489, 490, 492, 493, 494, 495,
57, 488, 491, 26
*NSet, NSET=loadpoints-13, INSTANCE=Upper_Skin-instance
376, 498, 504, 505, 499, 500, 501, 502,
503, 58, 497, 27
*NSet, NSET=loadpoints-14, INSTANCE=Upper_Skin-instance
507, 509, 377, 508, 510, 511, 512, 513,
514, 59, 506, 28
*NSet, NSET=loadpoints-15, INSTANCE=Upper_Skin-instance
522, 378, 521, 523, 518, 519, 517, 520,
60, 516, 515, 29
*NSet, NSET=loadpoints-16, INSTANCE=Upper_Skin-instance
379, 532, 527, 531, 526, 61, 528, 525,
529, 530, 524, 30
*NSet, NSET=loadpoints-17, INSTANCE=Upper_Skin-instance
62, 2, 63, 64, 65, 66, 67, 68,
69, 70, 71, 4
*NSet, NSET=loadpoints-18, INSTANCE=Upper_Skin-instance
107, 533, 597, 596, 171, 595
*NSet, NSET=loadpoints-19, INSTANCE=Upper_Skin-instance
108, 534, 172, 598, 599, 600, 109
*NSet, NSET=loadpoints-20, INSTANCE=Upper_Skin-instance
603, 535, 173, 601, 602, 110
*NSet, NSET=loadpoints-21, INSTANCE=Upper_Skin-instance
536, 174, 604, 605, 606, 111, 537, 175,
607, 608, 609
*NSet, NSET=loadpoints-22, INSTANCE=Upper_Skin-instance
112, 538, 176, 610, 611, 612
*NSet, NSET=loadpoints-23, INSTANCE=Upper_Skin-instance
113, 539, 177, 613, 614, 615
*NSet, NSET=loadpoints-24, INSTANCE=Upper_Skin-instance
114, 540, 178, 616, 617, 618
*NSet, NSET=loadpoints-25, INSTANCE=Upper_Skin-instance
115, 541, 179, 620, 621, 619
*NSet, NSET=loadpoints-26, INSTANCE=Upper_Skin-instance
116, 542, 180, 622, 624, 623
*NSet, NSET=loadpoints-27, INSTANCE=Upper_Skin-instance
117, 626, 627, 543, 181, 625
*NSet, NSET=loadpoints-28, INSTANCE=Upper_Skin-instance
118, 544, 182, 629, 630, 628
*NSet, NSET=loadpoints-29, INSTANCE=Upper_Skin-instance
119, 545, 183, 632, 631, 633, 120
*NSet, NSET=loadpoints-30, INSTANCE=Upper_Skin-instance
546, 184, 635, 634, 636, 121
*NSet, NSET=loadpoints-31, INSTANCE=Upper_Skin-instance
547, 185, 637, 638, 639, 122
*NSet, NSET=loadpoints-32, INSTANCE=Upper_Skin-instance
548, 186, 640, 641, 642, 123
*NSet, NSET=loadpoints-33, INSTANCE=Upper_Skin-instance
549, 187, 643, 645, 644, 124
*NSet, NSET=loadpoints-34, INSTANCE=Upper_Skin-instance
646, 550, 188, 647, 648, 125, 650, 649,
651, 551, 189
*NSet, NSET=loadpoints-35, INSTANCE=Upper_Skin-instance
126, 552, 190, 652, 653, 654
*NSet, NSET=loadpoints-36, INSTANCE=Upper_Skin-instance
127, 553, 191, 655, 657, 656
*NSet, NSET=loadpoints-37, INSTANCE=Upper_Skin-instance
128, 658, 659, 660, 554, 192
*NSet, NSET=loadpoints-38, INSTANCE=Upper_Skin-instance
129, 555, 193, 661, 662, 663, 130
*NSet, NSET=loadpoints-39, INSTANCE=Upper_Skin-instance
556, 194, 665, 666, 664, 131
*NSet, NSET=loadpoints-40, INSTANCE=Upper_Skin-instance
557, 195, 668, 669, 667, 132
*NSet, NSET=loadpoints-41, INSTANCE=Upper_Skin-instance
671, 672, 558, 196, 670, 133
*NSet, NSET=loadpoints-42, INSTANCE=Upper_Skin-instance
673, 675, 559, 197, 674, 134
*NSet, NSET=loadpoints-43, INSTANCE=Upper_Skin-instance
560, 198, 676, 677, 678, 135
*NSet, NSET=loadpoints-44, INSTANCE=Upper_Skin-instance
561, 199, 680, 681, 679, 136
*NSet, NSET=loadpoints-45, INSTANCE=Upper_Skin-instance
562, 200, 683, 682, 684, 137
*NSet, NSET=loadpoints-46, INSTANCE=Upper_Skin-instance
563, 686, 201, 685, 687, 138
*NSet, NSET=loadpoints-47, INSTANCE=Upper_Skin-instance
139, 690, 564, 202, 688, 689, 140
*NSet, NSET=loadpoints-48, INSTANCE=Upper_Skin-instance
203, 692, 565, 693, 691, 141, 566, 204,
694, 695, 696
*NSet, NSET=loadpoints-49, INSTANCE=Upper_Skin-instance
142, 205, 698, 567, 699, 697
*NSet, NSET=loadpoints-50, INSTANCE=Upper_Skin-instance
143, 206, 700, 568, 701, 702
*NSet, NSET=loadpoints-51, INSTANCE=Upper_Skin-instance
144, 207, 705, 569, 703, 704
*NSet, NSET=loadpoints-52, INSTANCE=Upper_Skin-instance
145, 208, 706, 707, 708, 570
*NSet, NSET=loadpoints-53, INSTANCE=Upper_Skin-instance
146, 209, 709, 710, 711, 571
*NSet, NSET=loadpoints-54, INSTANCE=Upper_Skin-instance
147, 210, 713, 712, 572, 714
*NSet, NSET=loadpoints-55, INSTANCE=Upper_Skin-instance
148, 211, 715, 716, 717, 573
*NSet, NSET=loadpoints-56, INSTANCE=Upper_Skin-instance
149, 212, 718, 719, 720, 574
*NSet, NSET=loadpoints-57, INSTANCE=Upper_Skin-instance
150, 213, 721, 722, 723, 575, 151
*NSet, NSET=loadpoints-58, INSTANCE=Upper_Skin-instance
214, 724, 725, 726, 576, 152
*NSet, NSET=loadpoints-59, INSTANCE=Upper_Skin-instance
215, 727, 728, 577, 729, 153
*NSet, NSET=loadpoints-60, INSTANCE=Upper_Skin-instance
216, 731, 730, 732, 578, 154
*NSet, NSET=loadpoints-61, INSTANCE=Upper_Skin-instance
217, 733, 734, 735, 579, 155
*NSet, NSET=loadpoints-62, INSTANCE=Upper_Skin-instance
218, 736, 737, 738, 580, 156, 219, 739,
740, 741, 581
*NSet, NSET=loadpoints-63, INSTANCE=Upper_Skin-instance
157, 220, 742, 743, 582, 744
*NSet, NSET=loadpoints-64, INSTANCE=Upper_Skin-instance
158, 221, 745, 746, 747, 583
*NSet, NSET=loadpoints-65, INSTANCE=Upper_Skin-instance
159, 222, 748, 749, 750, 584
*NSet, NSET=loadpoints-66, INSTANCE=Upper_Skin-instance
160, 223, 751, 752, 753, 585, 161
*NSet, NSET=loadpoints-67, INSTANCE=Upper_Skin-instance
754, 224, 755, 756, 586, 162
*NSet, NSET=loadpoints-68, INSTANCE=Upper_Skin-instance
225, 757, 758, 587, 759, 163
*NSet, NSET=loadpoints-69, INSTANCE=Upper_Skin-instance
226, 760, 761, 762, 588, 164
*NSet, NSET=loadpoints-70, INSTANCE=Upper_Skin-instance
227, 764, 763, 765, 589, 165
*NSet, NSET=loadpoints-71, INSTANCE=Upper_Skin-instance
228, 766, 767, 768, 590, 166
*NSet, NSET=loadpoints-72, INSTANCE=Upper_Skin-instance
229, 769, 770, 771, 591, 167
*NSet, NSET=loadpoints-73, INSTANCE=Upper_Skin-instance
230, 772, 773, 774, 592, 168
*NSet, NSET=loadpoints-74, INSTANCE=Upper_Skin-instance
231, 775, 776, 777, 593, 169
*NSet, NSET=loadpoints-75, INSTANCE=Upper_Skin-instance
232, 778, 779, 780, 594, 170, 9, 233,
10, 236, 235, 234
*NSet, NSET=engine_0_mass, INSTANCE=Lower_Skin-instance
169, 597, 658, 719, 780, 235, 168, 596,
657, 718, 779, 234
*Surface, TYPE=ELEMENT, NAME=surface
None-SET, SPOS
*Surface, TYPE=ELEMENT, NAME=surface-1
None-SET-1, SPOS
*Surface, TYPE=ELEMENT, NAME=surface-2
None-SET-2, SPOS
*Surface, TYPE=ELEMENT, NAME=surface-3
None-SET-3, SPOS
*Surface, TYPE=ELEMENT, NAME=surface-4
None-SET-4, SPOS
*Surface, TYPE=ELEMENT, NAME=surface-5
None-SET-5, SPOS
*Surface, TYPE=ELEMENT, NAME=surface-6
None-SET-6, SPOS
*Surface, TYPE=ELEMENT, NAME=surface-7
None-SET-7, SPOS
*Surface, TYPE=ELEMENT, NAME=surface-8
None-SET-8, SPOS
*Surface, TYPE=ELEMENT, NAME=surface-9
None-ELSET-E4, E4
None-ELSET-E2, E2
*Surface, TYPE=ELEMENT, NAME=surface-10
None-ELSET-E1, E1
*Surface, TYPE=ELEMENT, NAME=surface-11
None-ELSET-E2-1, E2
None-ELSET-E4-1, E4
*Surface, TYPE=ELEMENT, NAME=surface-12
None-ELSET-E3, E3
None-ELSET-E2-2, E2
*Surface, TYPE=ELEMENT, NAME=surface-13
None-ELSET-E2-3, E2
None-ELSET-E4-2, E4
*Surface, TYPE=ELEMENT, NAME=surface-14
None-ELSET-E4-3, E4
None-ELSET-E2-4, E2
*Surface, TYPE=ELEMENT, NAME=surface-15
None-ELSET-E1-1, E1
*Surface, TYPE=ELEMENT, NAME=surface-16
None-ELSET-E2-5, E2
None-ELSET-E4-4, E4
*Surface, TYPE=ELEMENT, NAME=surface-17
None-ELSET-E3-1, E3
None-ELSET-E2-6, E2
*Surface, TYPE=ELEMENT, NAME=surface-18
None-ELSET-E2-7, E2
None-ELSET-E4-5, E4
*Surface, TYPE=ELEMENT, NAME=surface-19
None-ELSET-E1-2, E1
*Surface, TYPE=ELEMENT, NAME=surface-20
None-ELSET-E3-2, E3
*Surface, TYPE=ELEMENT, NAME=surface-21
None-ELSET-E1-3, E1
*Surface, TYPE=ELEMENT, NAME=surface-22
None-ELSET-E3-3, E3
*Surface, TYPE=ELEMENT, NAME=surface-23
None-ELSET-E1-4, E1
*Surface, TYPE=ELEMENT, NAME=surface-24
None-ELSET-E3-4, E3
*Surface, TYPE=ELEMENT, NAME=surface-25
None-ELSET-E1-5, E1
*Surface, TYPE=ELEMENT, NAME=surface-26
None-ELSET-E3-5, E3
*Surface, TYPE=ELEMENT, NAME=surface-27
None-SET-9, SPOS
*Surface, TYPE=ELEMENT, NAME=surface-28
None-SET-10, SPOS
*Surface, TYPE=ELEMENT, NAME=surface-29
None-SET-11, SPOS
*Surface, TYPE=ELEMENT, NAME=surface-30
None-SET-12, SPOS
*Surface, TYPE=ELEMENT, NAME=surface-31
None-ELSET-E2-8, E2
*Surface, TYPE=ELEMENT, NAME=surface-32
None-ELSET-E2-9, E2
*Surface, TYPE=ELEMENT, NAME=surface-33
None-ELSET-E2-10, E2
*Surface, TYPE=ELEMENT, NAME=surface-34
None-ELSET-E2-11, E2
*Surface, TYPE=ELEMENT, NAME=surface-35
None-SET-13, SPOS
*Surface, TYPE=ELEMENT, NAME=surface-36
None-SET-14, SPOS
*Surface, TYPE=ELEMENT, NAME=surface-37
None-SET-15, SPOS
*Surface, TYPE=ELEMENT, NAME=surface-38
None-SET-16, SPOS
*Surface, TYPE=ELEMENT, NAME=surface-39
None-SET-17, SPOS
*Surface, TYPE=ELEMENT, NAME=surface-40
None-SET-18,
*Surface, TYPE=ELEMENT, NAME=surface-41
None-SET-19,
*Surface, TYPE=ELEMENT, NAME=surface-42
None-SET-20,
*Surface, TYPE=ELEMENT, NAME=surface-43
None-SET-21,
*Surface, TYPE=ELEMENT, NAME=surface-44
None-SET-22,
*Surface, TYPE=ELEMENT, NAME=surface-45
None-SET-23,
*Surface, TYPE=ELEMENT, NAME=surface-46
None-SET-24,
*Surface, TYPE=ELEMENT, NAME=surface-47
None-SET-25,
*Surface, TYPE=ELEMENT, NAME=surface-48
None-SET-26,
*Surface, TYPE=ELEMENT, NAME=surface-49
None-SET-27,
*Surface, TYPE=ELEMENT, NAME=surface-50
None-SET-28,
*Surface, TYPE=ELEMENT, NAME=surface-51
None-SET-29,
*Surface, TYPE=ELEMENT, NAME=surface-52
None-SET-30,
*Surface, TYPE=ELEMENT, NAME=surface-53
None-SET-31,
*Surface, TYPE=ELEMENT, NAME=surface-54
None-SET-32,
*Surface, TYPE=ELEMENT, NAME=surface-55
None-SET-33,
*Surface, TYPE=ELEMENT, NAME=surface-56
None-SET-34,
*Surface, TYPE=ELEMENT, NAME=surface-57
None-SET-35,
*Surface, TYPE=ELEMENT, NAME=surface-58
None-SET-36,
*Surface, TYPE=ELEMENT, NAME=surface-59
None-SET-37,
*Surface, TYPE=ELEMENT, NAME=surface-60
None-SET-38,
*Surface, TYPE=ELEMENT, NAME=surface-61
None-SET-39,
*Surface, TYPE=ELEMENT, NAME=surface-62
None-SET-40,
*Surface, TYPE=ELEMENT, NAME=surface-63
None-SET-41,
*Surface, TYPE=ELEMENT, NAME=surface-64
None-ELSET-E2-12, E2
None-ELSET-E4-6, E4
*Surface, TYPE=ELEMENT, NAME=surface-65
None-ELSET-E4-7, E4
None-ELSET-E2-13, E2
*Surface, TYPE=ELEMENT, NAME=surface-66
None-ELSET-E1-6, E1
*Surface, TYPE=ELEMENT, NAME=surface-67
None-ELSET-E1-7, E1
*Surface, TYPE=ELEMENT, NAME=surface-68
None-ELSET-E2-14, E2
None-ELSET-E4-8, E4
*Surface, TYPE=ELEMENT, NAME=surface-69
None-ELSET-E4-9, E4
None-ELSET-E2-15, E2
*Surface, TYPE=ELEMENT, NAME=surface-70
None-ELSET-E1-8, E1
*Surface, TYPE=ELEMENT, NAME=surface-71
None-ELSET-E1-9, E1
*Surface, TYPE=ELEMENT, NAME=surface-72
None-ELSET-E2-16, E2
None-ELSET-E4-10, E4
*Surface, TYPE=ELEMENT, NAME=surface-73
None-ELSET-E4-11, E4
None-ELSET-E2-17, E2
*Surface, TYPE=ELEMENT, NAME=surface-74
None-ELSET-E1-10, E1
*Surface, TYPE=ELEMENT, NAME=surface-75
None-ELSET-E1-11, E1
*Surface, TYPE=ELEMENT, NAME=surface-76
None-ELSET-E2-18, E2
None-ELSET-E4-12, E4
*Surface, TYPE=ELEMENT, NAME=surface-77
None-ELSET-E4-13, E4
None-ELSET-E2-19, E2
*Surface, TYPE=ELEMENT, NAME=surface-78
None-ELSET-E1-12, E1
*Surface, TYPE=ELEMENT, NAME=surface-79
None-ELSET-E1-13, E1
*Surface, TYPE=ELEMENT, NAME=surface-80
None-ELSET-E2-20, E2
None-ELSET-E4-14, E4
*Surface, TYPE=ELEMENT, NAME=surface-81
None-ELSET-E4-15, E4
None-ELSET-E2-21, E2
*Surface, TYPE=ELEMENT, NAME=surface-82
None-ELSET-E1-14, E1
*Surface, TYPE=ELEMENT, NAME=surface-83
None-ELSET-E1-15, E1
*Tie, NAME=tie, TYPE=Surface to Surface
surface-9, surface
*Tie, NAME=tie-1, TYPE=Surface to Surface
surface-12, surface-3
*Tie, NAME=tie-2, TYPE=Surface to Surface
surface-14, surface-1
*Tie, NAME=tie-3, TYPE=Surface to Surface
surface-17, surface-4
*Tie, NAME=tie-4, TYPE=Surface to Surface
surface-11, surface-5
*Tie, NAME=tie-5, TYPE=Surface to Surface
surface-13, surface-7
*Tie, NAME=tie-6, TYPE=Surface to Surface
surface-16, surface-6
*Tie, NAME=tie-7, TYPE=Surface to Surface
surface-18, surface-8
*Tie, NAME=tie-8, TYPE=Surface to Surface
surface-19, surface-23
*Tie, NAME=tie-9, TYPE=Surface to Surface
surface-20, surface-25
*Tie, NAME=tie-10, TYPE=Surface to Surface
surface-21, surface-24
*Tie, NAME=tie-11, TYPE=Surface to Surface
surface-22, surface-26
*Tie, NAME=tie-12, TYPE=Surface to Surface
surface-31, surface-35
*Tie, NAME=tie-13, TYPE=Surface to Surface
surface-32, surface-39
*Tie, NAME=tie-14, TYPE=Surface to Surface
surface-37, surface-40
*Tie, NAME=tie-15, TYPE=Surface to Surface
surface-37, surface-41
*Tie, NAME=tie-16, TYPE=Surface to Surface
surface-37, surface-42
*Tie, NAME=tie-17, TYPE=Surface to Surface
surface-37, surface-43
*Tie, NAME=tie-18, TYPE=Surface to Surface
surface-37, surface-44
*Tie, NAME=tie-19, TYPE=Surface to Surface
surface-37, surface-45
*Tie, NAME=tie-20, TYPE=Surface to Surface
surface-37, surface-46
*Tie, NAME=tie-21, TYPE=Surface to Surface
surface-37, surface-47
*Tie, NAME=tie-22, TYPE=Surface to Surface
surface-38, surface-48
*Tie, NAME=tie-23, TYPE=Surface to Surface
surface-38, surface-49
*Tie, NAME=tie-24, TYPE=Surface to Surface
surface-38, surface-50
*Tie, NAME=tie-25, TYPE=Surface to Surface
surface-38, surface-51
*Tie, NAME=tie-26, TYPE=Surface to Surface
surface-38, surface-52
*Tie, NAME=tie-27, TYPE=Surface to Surface
surface-38, surface-53
*Tie, NAME=tie-28, TYPE=Surface to Surface
surface-38, surface-54
*Tie, NAME=tie-29, TYPE=Surface to Surface
surface-38, surface-55
*End Assembly
**
** MATERIALS
**
*Material, NAME=user-chosen_material
*Density
2810
*Elastic
72000000000.0, 0.33
**
** STEPS
**
** Name: boundary-condition Type: Displacement/Rotation
*Boundary
set, 1, 1
set, 2, 2
set, 3, 3
set, 4, 4
set, 5, 5
set, 6, 6
** Name: boundary-condition-1 Type: Displacement/Rotation
*Boundary
set-1, 1, 1
set-1, 2, 2
set-1, 3, 3
set-1, 4, 4
set-1, 5, 5
set-1, 6, 6
** Name: boundary-condition-2 Type: Displacement/Rotation
*Boundary
set-2, 1, 1
set-2, 2, 2
set-2, 3, 3
set-2, 4, 4
set-2, 5, 5
set-2, 6, 6
** Name: boundary-condition-3 Type: Displacement/Rotation
*Boundary
set-3, 1, 1
set-3, 2, 2
set-3, 3, 3
set-3, 4, 4
set-3, 5, 5
set-3, 6, 6
** Name: boundary-condition-4 Type: Displacement/Rotation
*Boundary
set-4, 1, 1
set-4, 2, 2
set-4, 3, 3
set-4, 4, 4
set-4, 5, 5
set-4, 6, 6
**
** STEP: analysis1
**
*Step, NAME=analysis1, NLGEOM=NO
*Static
0.01, 1.0, 1e-15, 0.1
*CLoad
loadpoints, 3, 3185.0649350649346
*CLoad
loadpoints-1, 3, 3143.1561859193434
*CLoad
loadpoints-2, 3, 3101.2474367737523
*CLoad
loadpoints-3, 3, 3059.3386876281606
*CLoad
loadpoints-4, 3, 3017.4299384825695
*CLoad
loadpoints-5, 3, 2975.5211893369783
*CLoad
loadpoints-6, 3, 2933.612440191387
*CLoad
loadpoints-7, 3, 2891.703691045796
*CLoad
loadpoints-8, 3, 2849.794941900205
*CLoad
loadpoints-9, 3, 2807.886192754613
*CLoad
loadpoints-10, 3, 2765.9774436090224
*CLoad
loadpoints-11, 3, 2724.068694463431
*CLoad
loadpoints-12, 3, 2682.1599453178396
*CLoad
loadpoints-13, 3, 2640.2511961722485
*CLoad
loadpoints-14, 3, 2598.3424470266573
*CLoad
loadpoints-15, 3, 2556.4336978810657
*CLoad
loadpoints-16, 3, 2514.524948735475
*CLoad
loadpoints-17, 3, 2472.6161995898833
*CLoad
loadpoints-18, 3, 2430.707450444292
*CLoad
loadpoints-19, 3, 2388.798701298701
*CLoad
loadpoints-20, 3, 2346.88995215311
*CLoad
loadpoints-21, 3, 2304.981203007518
*CLoad
loadpoints-22, 3, 2263.072453861927
*CLoad
loadpoints-23, 3, 2221.1637047163363
*CLoad
loadpoints-24, 3, 2179.2549555707446
*CLoad
loadpoints-25, 3, 2137.3462064251535
*CLoad
loadpoints-26, 3, 2095.437457279562
*CLoad
loadpoints-27, 3, 2053.528708133971
*CLoad
loadpoints-28, 3, 2011.6199589883797
*CLoad
loadpoints-29, 3, 1969.7112098427885
*CLoad
loadpoints-30, 3, 1927.8024606971971
*CLoad
loadpoints-31, 3, 1885.893711551606
*CLoad
loadpoints-32, 3, 1843.9849624060148
*CLoad
loadpoints-33, 3, 1802.0762132604234
*CLoad
loadpoints-34, 3, 1760.167464114832
*CLoad
loadpoints-35, 3, 1718.258714969241
*CLoad
loadpoints-36, 3, 1676.3499658236497
*CLoad
loadpoints-37, 3, 1634.4412166780583
*CLoad
loadpoints-38, 3, 1592.5324675324673
*CLoad
loadpoints-39, 3, 1550.623718386876
*CLoad
loadpoints-40, 3, 1508.714969241285
*CLoad
loadpoints-41, 3, 1466.8062200956936
*CLoad
loadpoints-42, 3, 1424.8974709501022
*CLoad
loadpoints-43, 3, 1382.9887218045112
*CLoad
loadpoints-44, 3, 1341.0799726589198
*CLoad
loadpoints-45, 3, 1299.1712235133284
*CLoad
loadpoints-46, 3, 1257.2624743677375
*CLoad
loadpoints-47, 3, 1215.353725222146
*CLoad
loadpoints-48, 3, 1173.4449760765547
*CLoad
loadpoints-49, 3, 1131.5362269309633
*CLoad
loadpoints-50, 3, 1089.6274777853723
*CLoad
loadpoints-51, 3, 1047.718728639781
*CLoad
loadpoints-52, 3, 1005.8099794941895
*CLoad
loadpoints-53, 3, 963.9012303485985
*CLoad
loadpoints-54, 3, 921.9924812030074
*CLoad
loadpoints-55, 3, 880.083732057416
*CLoad
loadpoints-56, 3, 838.174982911825
*CLoad
loadpoints-57, 3, 796.2662337662337
*CLoad
loadpoints-58, 3, 754.3574846206423
*CLoad
loadpoints-59, 3, 712.4487354750513
*CLoad
loadpoints-60, 3, 670.5399863294599
*CLoad
loadpoints-61, 3, 628.6312371838685
*CLoad
loadpoints-62, 3, 586.7224880382774
*CLoad
loadpoints-63, 3, 544.8137388926862
*CLoad
loadpoints-64, 3, 502.90498974709476
*CLoad
loadpoints-65, 3, 460.9962406015037
*CLoad
loadpoints-66, 3, 419.08749145591236
*CLoad
loadpoints-67, 3, 377.17874231032096
*CLoad
loadpoints-68, 3, 335.2699931647296
*CLoad
loadpoints-69, 3, 293.36124401913855
*CLoad
loadpoints-70, 3, 251.45249487354718
*CLoad
loadpoints-71, 3, 209.5437457279558
*CLoad
loadpoints-72, 3, 167.6349965823648
*CLoad
loadpoints-73, 3, 125.72624743677342
*CLoad
loadpoints-74, 3, 83.81749829118205
*CLoad
loadpoints-75, 3, 41.90874914559137
*CLoad
engine_0_mass, 3, -9810.0
*Output, NAME=field-output, FIELD, VARIABLE=PRESELECT
*Output, NAME=history-output, HISTORY, VARIABLE=PRESELECT
*End Step
